# AguaClara Design Tool
# [reference: BasicClientInputs.xmcd]
# [reference: ExpertClientInputs.xmcd]
# [reference: DesignAssumptions.xmcd]
# [reference: MathFunctions.xmcd]
# [reference: PipeDatabase.xmcd]
# [reference: MinorLossCoefficients.xmcd]
# [reference: FluidsFunctions.xmcd]
# [reference: Influent Sed Manifold.xmcd]
# [reference: SludgeDrain.xmcd]
# [reference: Sedimentation Dimensions.xmcd]
# [reference: Inlet Channel.xmcd]
# [reference: Launder.xmcd]
# [reference: Exit Channel.xmcd]
# [reference: Lamella.xmcd]
# [reference: Floc Hopper.xmcd]
# [reference: FCM.xmcd]
# [reference: Flocculation Energy Dissapation.xmcd]
# [reference: RapidMixer.xmcd]
# [reference: Materials List.xmcd]
# [reference: AutoCADMasterProgram.xmcd]
# This file must have at least one variable displayed otherwise it doesn't recalculate and it claims that all variables are undefined.
L_Sed = 2.77714 m
AC_FlocTank = [
    "-layer m floctank"; "c t 91,91,91"; "floctank"; "  "; "_-view o t _zoom w 0.16,2.14,0 -2.93714,4.71,1.79191 _box 0,2.3,0 -2.77714,4.55,1.79191 _box 0.15,2.15,-0.15 -2.92714,4.7,1.79191 _subtract 0.15,2.15,-0.15  0,2.3,0 "; "-layer s 0"; "  "; "-layer f floctank"; "  "; "-layer m floctankwall"
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]
AC_SedTank = [
    "_-view o t"; "-layer m tank"; "c t 132,132,132"; "tank"; "  "; "_-view o t _zoom w 0.16,-0.16,0 -2.93714,1.16,1.56855 _box 0,0,0 -2.77714,1,1.56855 _box 0.15,-0.15,-0.15 -2.92714,1.15,1.56855 _subtract 0.15,-0.15,-0.15  0,0,0 "; "-layer s 0"; "  "; "-layer f tank"; "  "
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]
