# AguaClara Water Treatment Plants
# Automated Design
# Add variable descriptions next to every varible so it is easy to interpret what this all means.
# Design References
# MathCAD dimension calculations:
# [reference: BasicInputs.xmcd]
# Use BasicClientInputs and ExpertClientInputs when this is run by LabVIEW.
# Use BasicInputs and ExpertInputs to use the program in MathCAD
# Change the reference by
# - right clicking
# - select properties
# - reference tab
# - type in the correct file name
# [reference: ExpertInputs.xmcd]
# [reference: DesignAssumptions.xmcd]
# [reference: MathFunctions.xmcd]
# [reference: PipeDatabase.xmcd]
# [reference: MinorLossCoefficients.xmcd]
# [reference: FluidsFunctions.xmcd]
# [reference: Sedimentation Tank.xmcd]
# [reference: Flocculator.xmcd]
# [reference: Rapid Mix.xmcd]
# [reference: LFOM.xmcd]
# [reference: EntranceTankDim.xmcd]
# [reference: LinearCdc_app37.xmcd]
# [reference: ChemStorageCylinders.xmcd]
# [reference: Materials List.xmcd]
# [reference: SRSF jcw57.xmcd]
# AutoCAD drawing programs:
# Translators:
# These are the codes that take MathCAD outputs and create AutoCAD scripts that are used to draw the plant (formerly Basics)
# [reference: MtoATranslators.xmcd]
# The wrapped MtoA translator contains the functions that the user will want to access. These functions will draw pieces with full functionality - specifying the location, dimension, and orientation of the object. Also, it contains layer control and subtraction capabilities for grouped objects.
# [reference: MtoATranslators Wrapped.xmcd]
# Plant Elements:
# These are all of the files that draw the fundamental parts of the plants (tees, elbows, tanks, pipes, etc)
# [reference: Channel.xmcd]
# [reference: cross.xmcd]
# [reference: Sludge.xmcd]
# [reference: Manifold.xmcd]
# [reference: pipe.xmcd]
# [reference: elbow.xmcd]
# [reference: Tee.xmcd]
# [reference: tank.xmcd]
# [reference: lamina.xmcd]
# [reference: adapter.xmcd]
# [reference: Tee2.xmcd]
# [reference: pvccap.xmcd]
# [reference: LaunderCap.xmcd]
# [reference: ChimneyStops.xmcd]
# [reference: laminaplain.xmcd]
# [reference: Stairs.xmcd]
# [reference: DrainChannel.xmcd]
# [reference: Manifold.xmcd]
# Specific Pieces:
# These are the codes that draw the bigger pieces of the plant (the sed tank, floc tank, etc)
# [reference: floctank.xmcd]
# [reference: chlorinestock.xmcd]
# [reference: SedTank- with pieces.xmcd]
# [reference: Entrance Tank.xmcd]
# [reference: ChemStockCylinders.xmcd]
# [reference: Plant Drain Channel.xmcd]
# [reference: Operator Access.xmcd]
# [reference: SRSF.xmcd]
# Layouts:
# This file will execute at the very end to create multiple views of the entire plant in paperspace
# [reference: Layouts.xmcd]
# Sed Tanks and Slopes:
N_SedTanks = 2
H_SedBetween = 0 cm  # Distance from the top of the inlet manifold to the bottom of the ledge supporting the lamella frame
L_Sed = 3.505 m
N_SedBays = 2  # Number of bays of inlet manifolds in each sed tank
# Length of the port through which water exits the inlet manifold
# Width of ferrous cement plates in whice one manifold port is cut
Q_SedBay = 3 L/s
# Sedimentation Tank Sludge Drain:
N_SedSludgeOrifices = 35  # per cell
Ti_SludgeDrain = 30 min  # Tank Drain time
W_SedSludge = 9.63093 cm  # Width of the sludge channel
B_SedSludgeOrifices = 10 cm  # Distance center to center between drain orifices
H_SedSludge = 4.81547 cm  # Depth of the sludge channel
T_SedSludge = 5 cm
T_SedSludge = 5 cm
# Thickness of the plate topping the sludge channel
# through which drain holes are formed
W_SedDrainCover = 19.6309 cm
D_SedSludgeOrifice = 0.011 m  # Diameter of drain orifices
W_SedInletBottom = 0.441845 m
N_SedSludgeOrifices = 35
ND_SedSludgeValve = 2 in
# Sedimentation Tank Dimensions:
Z_SedSludge = 0.0981547 m  # Height from 0 of the top of the sludge drain
Z_SedSlopes = 0.820152 m  # Height from 0 of the top of the inlet manifold
W_Sed = 2.16 m  # Total tank wall height
L_Sed = 3.505 m  # Total tank length
# Inlet Channel:
HW_InletChannel = 0.255898 m  # Width of the drop chimneys connecting channel to sed inlet manifolds
W_InletChannel = 0.408427 m  # length of drop chimmneys
L_Channel = 4.77 m
N_SedInletPipes = 2  # per sed bay
H_InletChannel = 0.355898 m
# Sedimentation Tank Effluent Launder:
N_SedLaunderOrifices = 44  # Number of orifices per launder
Q_SedLaunderOrifices = 7.12643e-5 m^3/s  # More Launder Dimensions
ND_SedLaunder = 4 in
B_SedLaunderOrifices = 0.101179 m  # Center to center launder spacing
L_SedLaunder = 2.36953 m
# Exit Channel:
D_SedLaunderOrifice = 0.511811 in
W_ExitChannel = 0.369093 m
H_ExitChannel = 0.355898 m
L_ExitChannel = 4.77 m
H_PltWeir = 0.265898 m  # height of the weir carrying water to the distribution tank
HW_ExitChannel = 0.215898 m  # water height in exit channel from 0
# Lamella:
L_SedPlate = 0.609667 m
B_SedPlate = 2.85208 cm  # center to center distance between lamella
S_SedPlate = 2.65208 cm  # spacing between lamella
N_SedPlates = 70  # Number of Sed Plates per Sedimentation Tank Bay.
AN_SedPlate = 60 deg
V_SedC = 10.2206 m/day
L_SedActive = 2.30531 m
T
V_SedUp = 68.4737 m/day
Z_SedLaunder = 1.54355 m
H_SedPlate = 0.527987 m
H_SedAbove = 0.15133 m  # Height of water needed above the lamella
N_SedPlates = 70
HW_Sed = 1.63773 m
H_Sed = 1.73773 m
Z_Mp = 1.38183 m
H_SedBayDivider = 0.820152 m
# Flocculator: | Look at Flocculator Positioning arrays
W_FlocChannel = 0.54 m
# Fill last channel with bafffles from last channel
# Fix port width to be based on energy dissipation in that channel
ED_Floc = 6 mW/kg
# Adjust spacing after the number of baffles per channel is known.
# Check the residence time of the flocculator should be at least 20minutes
HW_FlocEnd = 1.63773 m
X_FlocBaffles = [
    0.19135, 0.19135, 0.19135, 0.19135, 0.275898;
    0.3647, 0.3647, 0.3647, 0.3647, 0.454471;
    0.538049, 0.538049, 0.538049, 0.538049, 0.633045;
    0.711399, 0.711399, 0.711399, 0.711399, 0.811618;
    0.884749, 0.884749, 0.884749, 0.884749, 0.990192;
    1.0581, 1.0581, 1.0581, 1.0581, 1.16877;
    1.23145, 1.23145, 1.23145, 1.23145, 1.34734;
    1.4048, 1.4048, 1.4048, 1.4048, 1.52591;
    1.57815, 1.57815, 1.57815, 1.57815, 1.70449;
    1.7515, 1.7515, 1.7515, 1.7515, 1.88306;
    1.92485, 1.92485, 1.92485, 1.92485, 2.06163;
    2.0982, 2.0982, 2.0982, 2.0982, 2.24021;
    2.27155, 2.27155, 2.27155, 2.27155, 2.41878;
    2.4449, 2.4449, 2.4449, 2.4449, 2.59735;
    2.61825, 2.61825, 2.61825, 2.61825, 2.77593;
    2.7916, 2.7916, 2.7916, 2.7916, 2.9545;
    2.96495, 2.96495, 2.96495, 2.96495, 3.13307;
    3.1383, 3.1383, 3.1383, 3.1383, 3.31165;
    3.31165, 3.31165, 3.31165, 3.31165, 0
] m
L_FlocBaffles = [
    1.3807, 1.3807, 1.3807, 1.3807, 1.5986;
    1.5986, 1.5986, 1.5986, 1.5986, 1.3807;
    1.3807, 1.3807, 1.3807, 1.3807, 1.5986;
    1.5986, 1.5986, 1.5986, 1.5986, 1.3807;
    1.3807, 1.3807, 1.3807, 1.3807, 1.5986;
    1.5986, 1.5986, 1.5986, 1.5986, 1.3807;
    1.3807, 1.3807, 1.3807, 1.3807, 1.5986;
    1.5986, 1.5986, 1.5986, 1.5986, 1.3807;
    1.3807, 1.3807, 1.3807, 1.3807, 1.5986;
    1.5986, 1.5986, 1.5986, 1.5986, 1.3807;
    1.3807, 1.3807, 1.3807, 1.3807, 1.5986;
    1.5986, 1.5986, 1.5986, 1.5986, 1.3807;
    1.3807, 1.3807, 1.3807, 1.3807, 1.5986;
    1.5986, 1.5986, 1.5986, 1.5986, 1.3807;
    1.3807, 1.3807, 1.3807, 1.3807, 1.5986;
    1.5986, 1.5986, 1.5986, 1.5986, 1.3807;
    1.3807, 1.3807, 1.3807, 1.3807, 1.5986;
    1.5986, 1.5986, 1.5986, 1.5986, 1.3807;
    1.3807, 1.3807, 1.3807, 1.3807, 0
] m
Z_FlocBaffles = [
    0, 0, 0, 0, 0.26486;
    0.257025, 0.257025, 0.257025, 0.257025, 0;
    0, 0, 0, 0, 0.26486;
    0.257025, 0.257025, 0.257025, 0.257025, 0;
    0, 0, 0, 0, 0.26486;
    0.257025, 0.257025, 0.257025, 0.257025, 0;
    0, 0, 0, 0, 0.26486;
    0.257025, 0.257025, 0.257025, 0.257025, 0;
    0, 0, 0, 0, 0.26486;
    0.257025, 0.257025, 0.257025, 0.257025, 0;
    0, 0, 0, 0, 0.26486;
    0.257025, 0.257025, 0.257025, 0.257025, 0;
    0, 0, 0, 0, 0.26486;
    0.257025, 0.257025, 0.257025, 0.257025, 0;
    0, 0, 0, 0, 0.26486;
    0.257025, 0.257025, 0.257025, 0.257025, 0;
    0, 0, 0, 0, 0.26486;
    0.257025, 0.257025, 0.257025, 0.257025, 0;
    0, 0, 0, 0, 0
] m
N_FlocChannels = 5
L_FlocTank = 17.525 m
HL_Floc = 16.7894 cm
HW_FlocStart = 1.80562 m
S_FlocBaffle = [17.135; 17.135; 17.135; 17.135; 17.6573] cm
B_FlocBaffle = [17.335; 17.335; 17.335; 17.335; 17.8573] cm
N_FlocChannelBaffles = [19; 19; 19; 19; 18]
W_FlocPort = [0.17135; 0.17135; 0.17135; 0.17135; 0.182579] m
HL_FlocChannels = [3.43018; 3.43018; 3.43018; 3.43018; 3.06872] cm
L_FlocBaffleLower = 1.3807 m
L_FlocBaffleUpper = 1.5986 m
H_FlocPort = [0.54; 0.54; 0.54; 0.54; 0.522239] m
Ti_Floc = 21.5259 min  # residence time of the flocculator
N_FlocBaffles = 94
# Materials List:
N_Launders = 4
L_LaunderPipeTotal = 9.47813 m
N_Valves = 4
N_LaunderCouplings = 4
N_ValveCouplings = 4
N_SedPlatesTotal = 280
N_SedPlatesPerSheet = 6
N_SedPlateSheets = 47
AC_SedTank =  # no stored result
AC_EntranceTank =  # no stored result
AC_FlocTank = [
    "-layer m FlocTank";
    "c t 132,132,132";
    "FlocTank";
    "  ";
    "_-view o t _zoom w 0.16,4.46,0 -3.665,8.08,1.90562 _box 0,4.62,0 -3.505,7.92,1.90562 _box 0.15,4.47,-0.15 -3.655,8.07,1.90562 _subtract 0.15,4.47,-0.15  0,4.62,0 ";
    "_box -3.655,5.16,0 0.15,5.31,1.90562";
    "_box -3.655,5.85,0 0.15,6,1.90562";
    "_box -3.655,6.54,0 0.15,6.69,1.90562";
    "_box -3.655,7.23,0 0.15,7.38,1.90562";
    "-group c FlocTank y "
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]
AC_ChemTanks = [
    "-layer m chlorinetanks"; "c t 132,132,132"; "chlorinetanks"; "  "; "_-view o t"; "_cylinder -4.98851,0.09076,2.91944 0.18152 0.53456"; "_cylinder -4.98851,0.09076,2.92444 0.17652 0.52956"; "_-view o t"; "_subtract -5.17003,0.09076,2.91944  -5.16503,0.09076,2.91944 "; "mirror3d all  YZ -4.65459,0.1524,0.1524 N  "
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]
AC_OperatorAccess = [
    "-layer m AlumPlatform"; "c t 132,132,132"; "AlumPlatform"; "  "; "_-view o f"; "_pline"; "-6.04275,2.91944"; "-5.74275,2.91944"; "-5.74275,2.71481"; "-5.44275,2.71481"
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]
AC_DrainChannel = [
    "-layer m DrainChannel"; "c t 214,214,214"; "DrainChannel"; "  "; "3dpoly"; "0.3,-0.40718,-0.2024"; "0.3,-0.40718,-0.27378"; "0.3,-0.00717,-0.49516"; "0.3,0.39283,-0.27378"; "0.3,0.39283,-0.2024"
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]
